Fri Aug 13 15:39:44 CDT 2021
;; 1. Based on:
;; 2. Description: PK model
;; x1. Author: user
;; 3. Label:
$PROBLEM    PK
$INPUT      C ID TIME NTIME DV AMT CMT EVID MDV TYPE GENO SEX
            ETHNICITY AGE WT HT CRCL DOSE BMI
$DATA      r4pmx_dataset_simulation1.csv IGNORE=C IGNORE(TYPE.EQ.2)
$SUBROUTINE ADVAN13 TOL=12
$MODEL      COMP=(DEPOT) COMP=(TRANS1) COMP=(TRANS2) COMP=(TRANS3)
            COMP=(CENT)
$PK
TVKTR  = THETA(1)
TVCL   = THETA(2)*((WT/70)**0.75)
TVVC   = THETA(3)*(WT/70)

KTR    = TVKTR * EXP(ETA(1))
CL     = TVCL  * EXP(ETA(2))
VC     = TVVC  * EXP(ETA(3))

S5=VC

KEL=CL/VC

$DES
CP = A(5)/VC

DADT(1)= - KTR * A(1)
DADT(2)=   KTR * (A(1) - A(2))
DADT(3)=   KTR * (A(2) - A(3))
DADT(4)=   KTR * (A(3) - A(4))

DADT(5)=   KTR * A(4) - CL*CP

$ERROR
CCP   = A(5)/S5
IPRED = CCP
Y   = IPRED + IPRED*ERR(1)

$THETA  (0,1) ; KTR
 (0,1) ; CL
 (0,20) ; VC
$OMEGA  0.1  ;    IIV KTR
$OMEGA  BLOCK(2)
 0.1  ;     IIV CL
 0.05 0.2  ;     IIV VC
$SIGMA  0.01  ;   Prop ERR
$ESTIMATION METHOD=1 INTER PRINT=5 MAX=9999 NSIG=3 SIGL=9 POSTHOC
$COVARIANCE SIGL=12 MATRIX=R PRINT=E
$TABLE      ID TIME DV MDV EVID IPRED PRED CWRES KTR CL VC KEL ETA1
            ETA2 ETA3 GENO SEX ETHNICITY AGE WT HT CRCL DOSE BMI
            ONEHEADER NOPRINT FILE=sdtab001

NM-TRAN MESSAGES
 WARNINGS AND ERRORS (IF ANY) FOR PROBLEM    1
 (WARNING  2) NM-TRAN INFERS THAT THE DATA ARE POPULATION.

1NONLINEAR MIXED EFFECTS MODEL PROGRAM (NONMEM) VERSION 7.5.0
 ORIGINALLY DEVELOPED BY STUART BEAL, LEWIS SHEINER, AND ALISON BOECKMANN
 CURRENT DEVELOPERS ARE ROBERT BAUER, ICON DEVELOPMENT SOLUTIONS,
 AND ALISON BOECKMANN. IMPLEMENTATION, EFFICIENCY, AND STANDARDIZATION
 PERFORMED BY NOUS INFOSYSTEMS.
 PROBLEM NO.:         1
 PK
 TOT. NO. OF OBS RECS:      731
 TOT. NO. OF INDIVIDUALS:      100
 GENERAL NONLINEAR KINETICS MODEL WITH STIFF/NONSTIFF EQUATIONS (LSODA, ADVAN13)
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 #TBLN:      1
 #METH: First Order Conditional Estimation with Interaction
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
 #TERM:
0MINIMIZATION SUCCESSFUL
 NO. OF FUNCTION EVALUATIONS USED:      175
 NO. OF SIG. DIGITS IN FINAL EST.:  3.8

 ETABAR IS THE ARITHMETIC MEAN OF THE ETA-ESTIMATES,
 AND THE P-VALUE IS GIVEN FOR THE NULL HYPOTHESIS THAT THE TRUE MEAN IS 0.

 ETABAR:        -1.0024E-02  4.2315E-02 -3.0172E-02
 SE:             4.4217E-02  5.9327E-02  3.6530E-02
 N:                     100         100         100

 P VAL.:         8.2066E-01  4.7570E-01  4.0883E-01

 ETASHRINKSD(%)  1.2292E+00  1.1653E+01  1.1262E+01
 ETASHRINKVR(%)  2.4433E+00  2.1948E+01  2.1255E+01
 EBVSHRINKSD(%)  1.7132E+00  9.6237E+00  1.0809E+01
 EBVSHRINKVR(%)  3.3971E+00  1.8321E+01  2.0450E+01
 RELATIVEINF(%)  9.6024E+01  7.9945E+01  7.7367E+01
 EPSSHRINKSD(%)  1.5558E+01
 EPSSHRINKVR(%)  2.8695E+01


 TOTAL DATA POINTS NORMALLY DISTRIBUTED (N):          731
 N*LOG(2PI) CONSTANT TO OBJECTIVE FUNCTION:    1343.4881355452314
 OBJECTIVE FUNCTION VALUE WITHOUT CONSTANT:   -553.87196786552306
 OBJECTIVE FUNCTION VALUE WITH CONSTANT:       789.61616767970838
 REPORTED OBJECTIVE FUNCTION DOES NOT CONTAIN CONSTANT

 TOTAL EFFECTIVE ETAS (NIND*NETA):                           300


 #TERE:
 Elapsed estimation  time in seconds:   168.20
 Elapsed covariance  time in seconds:   124.74
 Elapsed postprocess time in seconds:     1.91

 ********************               FIRST ORDER CONDITIONAL ESTIMATION WITH INTERACTION              ********************
 #OBJT:**************                       MINIMUM VALUE OF OBJECTIVE FUNCTION                      ********************
 #OBJV:********************************************     -553.872       **************************************************

 ********************               FIRST ORDER CONDITIONAL ESTIMATION WITH INTERACTION              ********************
 ********************                             FINAL PARAMETER ESTIMATE                           ********************

 THETA - VECTOR OF FIXED EFFECTS PARAMETERS   *********
         TH 1      TH 2      TH 3
         1.08E+00  5.71E-01  2.33E+01

 OMEGA - COV MATRIX FOR RANDOM EFFECTS - ETAS  ********
         ETA1      ETA2      ETA3
 ETA1
+        2.02E-01
 ETA2
+        0.00E+00  4.55E-01
 ETA3
+        0.00E+00  4.76E-02  1.71E-01

 SIGMA - COV MATRIX FOR RANDOM EFFECTS - EPSILONS  ****
         EPS1
 EPS1
+        9.43E-02

 OMEGA - CORR MATRIX FOR RANDOM EFFECTS - ETAS  *******
         ETA1      ETA2      ETA3
 ETA1
+        4.50E-01
 ETA2
+        0.00E+00  6.75E-01
 ETA3
+        0.00E+00  1.71E-01  4.14E-01

 SIGMA - CORR MATRIX FOR RANDOM EFFECTS - EPSILONS  ***
         EPS1
 EPS1
+        3.07E-01

 ********************               FIRST ORDER CONDITIONAL ESTIMATION WITH INTERACTION              ********************
 ********************                            STANDARD ERROR OF ESTIMATE                          ********************

 THETA - VECTOR OF FIXED EFFECTS PARAMETERS   *********
         TH 1      TH 2      TH 3
         4.79E-02  4.27E-02  1.08E+00

 OMEGA - COV MATRIX FOR RANDOM EFFECTS - ETAS  ********
         ETA1      ETA2      ETA3
 ETA1
+        2.96E-02
 ETA2
+       .........  8.12E-02
 ETA3
+       .........  3.41E-02  3.07E-02

 SIGMA - COV MATRIX FOR RANDOM EFFECTS - EPSILONS  ****
         EPS1
 EPS1
+        6.48E-03

 OMEGA - CORR MATRIX FOR RANDOM EFFECTS - ETAS  *******
         ETA1      ETA2      ETA3
 ETA1
+        3.29E-02
 ETA2
+       .........  6.01E-02
 ETA3
+       .........  1.20E-01  3.70E-02

 SIGMA - CORR MATRIX FOR RANDOM EFFECTS - EPSILONS  ***
         EPS1
 EPS1
+        1.05E-02

 ********************               FIRST ORDER CONDITIONAL ESTIMATION WITH INTERACTION              ********************
 ********************                          COVARIANCE MATRIX OF ESTIMATE                         ********************

            TH 1      TH 2      TH 3      OM11      OM12      OM13      OM22      OM23      OM33      SG11
 TH 1
+        2.30E-03
 TH 2
+        5.97E-05  1.82E-03
 TH 3
+        3.94E-03  3.39E-03  1.16E+00
 OM11
+       -1.90E-06 -1.50E-06 -4.09E-04  8.78E-04
 OM12
+       ......... ......... ......... ......... .........
 OM13
+       ......... ......... ......... ......... ......... .........
 OM22
+        1.06E-04 -6.06E-04  9.25E-03 -7.53E-06 ......... .........  6.59E-03
 OM23
+        5.02E-07  1.58E-04 -6.09E-04 -1.34E-05 ......... .........  3.08E-04  1.16E-03
 OM33
+        1.42E-05 -3.95E-05  1.01E-03  1.13E-06 ......... ......... -3.09E-05  1.54E-04  9.40E-04
 SG11
+       -4.25E-07  2.67E-05  7.46E-04 -2.94E-06 ......... ......... -1.97E-05  4.31E-06 -1.36E-05  4.19E-05

 ********************               FIRST ORDER CONDITIONAL ESTIMATION WITH INTERACTION              ********************
 ********************                          CORRELATION MATRIX OF ESTIMATE                        ********************

            TH 1      TH 2      TH 3      OM11      OM12      OM13      OM22      OM23      OM33      SG11
 TH 1
+        4.79E-02
 TH 2
+        2.92E-02  4.27E-02
 TH 3
+        7.64E-02  7.38E-02  1.08E+00
 OM11
+       -1.34E-03 -1.18E-03 -1.28E-02  2.96E-02
 OM12
+       ......... ......... ......... ......... .........
 OM13
+       ......... ......... ......... ......... ......... .........
 OM22
+        2.72E-02 -1.75E-01  1.06E-01 -3.13E-03 ......... .........  8.12E-02
 OM23
+        3.07E-04  1.08E-01 -1.66E-02 -1.33E-02 ......... .........  1.11E-01  3.41E-02
 OM33
+        9.69E-03 -3.02E-02  3.05E-02  1.24E-03 ......... ......... -1.24E-02  1.47E-01  3.07E-02
 SG11
+       -1.37E-03  9.64E-02  1.07E-01 -1.53E-02 ......... ......... -3.75E-02  1.95E-02 -6.84E-02  6.48E-03
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
 ********************               FIRST ORDER CONDITIONAL ESTIMATION WITH INTERACTION              ********************
 ********************                      EIGENVALUES OF COR MATRIX OF ESTIMATE                     ********************

             1         2         3         4         5         6         7         8
         6.52E-01  8.56E-01  9.23E-01  9.90E-01  1.01E+00  1.13E+00  1.20E+00  1.23E+00
 Elapsed finaloutput time in seconds:     0.07
 #CPUT: Total CPU Time in Seconds,      253.386
