Fri Sep 10 11:30:48 CDT 2021
$PROB Example 1
; Create a model to fit the data that you find more suitable according the the EDA.
$INPUT
        ; In this block we tell NM to label our dataset accordingly

ID      ; Individual identifier number
TIME    ; Time column (This can be clock or nominal time)
AMT     ;
DROP      ; Dependent variable column
DV       ; Dosage
MDV     ; Missing DVs

; After we did add the labels that matchs our dataset in the index we can move to set the
; directory

$DATA  data/dat1.csv  ignore=@        ; This refers to ignoring all non-numerical values
                        ; You can replace this with C if thats your column
                        ; or you can do #.
; Additional values can be added that is specific to dataset so NMTRAN can know what to do.
; e.g. ignore(CMT == 1) - I think its self explantory.

$SUBR   ; Here we add subroutines that are defined and written as functions in
        ; PREDPP. you can check the values for them in nonmem guide or in your terminal
        ;       "nmhelp ADVAN"

ADVAN1  ; subroutine PK library to implement one-compartment linear model
TRANS2  ; Translator that reads the PK parameters as CL and V from the PK block

$PK
        TVCL    = THETA(1)      ; Population typical value for CL
        TVV     = THETA(2)      ; Population typical value for V

        ; Individual model

        CL      =       TVCL * EXP(ETA(1))
        V       =       TVV  * EXP(ETA(2))
; For scaling parameter if we want the prediction and observation to have the same unit since F (prediction) will be devided by this value.
        S1      =       V

$ERROR

; In the error block, here we define the statistical model for the observation
; e.g. y = f(x) + error
IPRED   =       F
Y       =       IPRED * (1 + ERR(1))

; We just assigned the value here since we are interested in the ipred for diagnostic plots.

; We define the initial values
; try to have best guess.

$THETA NAMES(CL,V)
(0, 5)
(0. 40)

$OMEGA BLOCK(2) NAMES(CL,V) values(0.1,0.01)
$SIGMA 0.01

; In the estimation block; we define the algorithm that will approximate the value of maximum likelihood and estimate the PK parameters. Different options out there, and for this course, we are going to stick with first-order one.

$EST    MET=1 INTER NOABORT PRINT=1
; Table block request a dataframe (Tab separated - or actually you can request whatever you want) for post-processing in whatever other languages for data wrangling!!
$TAB   ID TIME DV AMT MDV IPRED PRED CWRES
        NPDE NPD ESAMPLE=1000 ONEHEADER NOPRINT NOAPPEND
        FILE=r1.tab

NM-TRAN MESSAGES
 WARNINGS AND ERRORS (IF ANY) FOR PROBLEM    1
 (WARNING  2) NM-TRAN INFERS THAT THE DATA ARE POPULATION.

1NONLINEAR MIXED EFFECTS MODEL PROGRAM (NONMEM) VERSION 7.5.0
 ORIGINALLY DEVELOPED BY STUART BEAL, LEWIS SHEINER, AND ALISON BOECKMANN
 CURRENT DEVELOPERS ARE ROBERT BAUER, ICON DEVELOPMENT SOLUTIONS,
 AND ALISON BOECKMANN. IMPLEMENTATION, EFFICIENCY, AND STANDARDIZATION
 PERFORMED BY NOUS INFOSYSTEMS.
 PROBLEM NO.:         1
 Example 1
 TOT. NO. OF OBS RECS:      500
 TOT. NO. OF INDIVIDUALS:       50
 ONE COMPARTMENT MODEL (ADVAN1)
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 #TBLN:      1
 #METH: First Order Conditional Estimation with Interaction
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
 #TERM:
0MINIMIZATION SUCCESSFUL
 NO. OF FUNCTION EVALUATIONS USED:      175
 NO. OF SIG. DIGITS IN FINAL EST.:  3.6

 ETABAR IS THE ARITHMETIC MEAN OF THE ETA-ESTIMATES,
 AND THE P-VALUE IS GIVEN FOR THE NULL HYPOTHESIS THAT THE TRUE MEAN IS 0.

 ETABAR:         5.7832E-04 -5.4152E-04
 SE:             4.0333E-02  4.2113E-03
 N:                      50          50

 P VAL.:         9.8856E-01  8.9768E-01

 ETASHRINKSD(%)  1.0000E-10  4.1043E+01
 ETASHRINKVR(%)  1.0000E-10  6.5241E+01
 EBVSHRINKSD(%)  8.2515E-01  4.1679E+01
 EBVSHRINKVR(%)  1.6435E+00  6.5987E+01
 RELATIVEINF(%)  1.0000E+02  3.3549E+01
 EPSSHRINKSD(%)  6.4615E+00
 EPSSHRINKVR(%)  1.2505E+01


 TOTAL DATA POINTS NORMALLY DISTRIBUTED (N):          500
 N*LOG(2PI) CONSTANT TO OBJECTIVE FUNCTION:    918.938533204673
 OBJECTIVE FUNCTION VALUE WITHOUT CONSTANT:   -2036.01372998808
 OBJECTIVE FUNCTION VALUE WITH CONSTANT:      -1117.07519678341
 REPORTED OBJECTIVE FUNCTION DOES NOT CONTAIN CONSTANT

 TOTAL EFFECTIVE ETAS (NIND*NETA):                           100


 #TERE:
 Elapsed estimation  time in seconds:     0.61
 Elapsed postprocess time in seconds:     0.41

 ********************               FIRST ORDER CONDITIONAL ESTIMATION WITH INTERACTION              ********************
 #OBJT:**************                       MINIMUM VALUE OF OBJECTIVE FUNCTION                      ********************
 #OBJV:********************************************    -2036.014       **************************************************

 ********************               FIRST ORDER CONDITIONAL ESTIMATION WITH INTERACTION              ********************
 ********************                             FINAL PARAMETER ESTIMATE                           ********************

 THETA - VECTOR OF FIXED EFFECTS PARAMETERS   *********
            THETA(CL) THETA(V)
            1.05E+01  4.96E+01

 OMEGA - COV MATRIX FOR RANDOM EFFECTS - ETAS  ********
            ETA(CL)   ETA(V)
 ETA(CL)
+           8.28E-02
 ETA(V)
+           2.72E-03  2.60E-03

 SIGMA - COV MATRIX FOR RANDOM EFFECTS - EPSILONS  ****
            EPS1
 EPS1
+           2.64E-02

 OMEGA - CORR MATRIX FOR RANDOM EFFECTS - ETAS  *******
            ETA(CL)   ETA(V)
 ETA(CL)
+           2.88E-01
 ETA(V)
+           1.85E-01  5.10E-02

 SIGMA - CORR MATRIX FOR RANDOM EFFECTS - EPSILONS  ***
            EPS1
 EPS1
+           1.62E-01
 Elapsed finaloutput time in seconds:     0.02
 #CPUT: Total CPU Time in Seconds,        1.096
